ORIGIN := 0
# Стоимость комплектующих:
parts_price := [
    6.7, 5, 6.5, 0.66, 1, 3.12, 2.14, 1.64, 1.2, 2.21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]
delivery_price := 20
parts_price_sum := sum(parts_price[0, i], i = 0 .. 41) = 93.05
Р_к := parts_price_sum + delivery_price = 113.05
# Расчет ЗП:
З_о := 18.24
Н_д := 70
Н_н := 150
Num := 500
З_д := З_о*Н_д/100 = 12.768
Р_н := З_о*Н_н/100 = 27.36
Н_соц := 35
Р_соц := (З_о + З_д)*Н_соц/100 = 10.8528
Р_м := 0
Н_ком := 5
С_пр := Р_м + Р_к + З_о + З_д + Р_соц + Р_н = 182.271
Р_ком := С_пр*Н_ком/100 = 9.11354
С_п := С_пр + Р_ком = 191.384
Н_ре := 20
П_ед := С_п*Н_ре/100 = 38.2769
Ц_отп := С_п + П_ед = 229.661
# Расчет чистой прибыли:
Н_п := 18
Num_1 := Num = 500
Num_2 := Num_1*1.2 = 600
Num_3 := Num_2*1.2 = 720
Num_4 := Num_3*1.2 = 864
П_ч1 := Num_1*П_ед*(1 - Н_п/100) = 15693.5
П_ч2 := Num_2*П_ед*(1 - Н_п/100) = 18832.2
П_ч3 := Num_3*П_ед*(1 - Н_п/100) = 22598.7
П_ч4 := Num_4*П_ед*(1 - Н_п/100) = 27118.4
# Расчет инвестиций в производство нового изделия:
З_о2 := 963.3
Р_м2 := 62.65
З_д2 := З_о2*Н_д/100 = 674.31
Р_соц2 := (З_о2 + З_д2)*Н_соц/100 = 573.163
Р_н2 := З_о2*Н_н/100 = 1444.95
С_р := Р_м2 + З_о2 + З_д2 + Р_соц2 + Р_н2 = 3718.37
П_п := С_р*Н_ре/100 = 743.675
И_раз := С_р + П_п = 4462.05
П_к := Р_к*Num = 56525
П_м := 0
И_об := 20/100*(П_к + П_м) = 11305
И := И_раз + И_об = 15767
# Расчет показателей экономической эффективности проекта:
Е_н := 0.12
t_р := 1
a(t) := 1/(1 + Е_н)^(t - t_р)
a_t1 := a(1) = 1
a_t2 := a(2) = 0.892857
a_t3 := a(3) = 0.797194
a_t4 := a(4) = 0.71178
П_чt1 := П_ч1*a_t1 = 15693.5
П_чt2 := П_ч2*a_t2 = 16814.5
П_чt3 := П_ч3*a_t3 = 18015.5
П_чt4 := П_ч4*a_t4 = 19302.3
Прир_1 := Num = 500
Прир_2 := Прир_1*1.2 = 600
Прир_3 := Прир_2*1.2 = 720
Прир_4 := Прир_3*1.2 = 864
И_об1 := Прир_1*0.2*Р_к = 11305
И_об2 := Прир_2*0.2*Р_к = 13566
И_об3 := Прир_3*0.2*Р_к = 16279.2
И_об4 := Прир_4*0.2*Р_к = 19535
И_1 := И_раз + И_об1 = 15767
И_2 := И_об2 = 13566
И_3 := И_об3 = 16279.2
И_4 := И_об4 = 19535
И_t1 := И_1*a_t1 = 15767
И_t2 := И_2*a_t2 = 12112.5
И_t3 := И_3*a_t3 = 12977.7
И_t4 := И_4*a_t4 = 13904.7
ЧДД_1 := a_t1*(П_ч1 - И_1) = -73.5323
ЧДД_2 := a_t2*(П_ч2 - И_2) = 4701.98
ЧДД_3 := a_t3*(П_ч3 - И_3) = 5037.84
ЧДД_4 := a_t4*(П_ч4 - И_4) = 5397.68
П_чср := (П_ч1 + П_ч2 + П_ч3 + П_ч4)/4 = 21060.7
Р_и := П_чср/(И_1 + И_2 + И_3 + И_4)*100 = 32.3278
